# Invalid: unknown fix style
units metal
dimension 3
boundary p p p
atom_style atomic

lattice fcc 3.615
region box block 0 4 0 4 0 4
create_box 1 box
create_atoms 1 box

fix 1 all bogus_style_nonsense 300.0 300.0 0.1
