# Version-aware keyword fixture
units metal
dimension 3
boundary p p p
atom_style atomic
lattice fcc 3.615
region box block 0 2 0 2 0 2
create_box 1 box
create_atoms 1 box
pair_style lj/cut 2.5
pair_coeff 1 1 1.0 1.0
kspace_style pppm/disp
run 0
