# Valid script with variable definitions and references
units metal
dimension 3
boundary p p p
atom_style atomic

lattice fcc 3.615
region box block 0 4 0 4 0 4
create_box 1 box

variable T equal 300.0
variable dt equal 0.001

timestep ${dt}
run 1000
